f(x) := x^3 + 2*x^2 + 10*x + 3
x := -5, -4 .. 5
# [plot: f(x) vs x]
g(a) := [a^3; cos(a); a^2]
h(u, v) := u^2 - v^2
b0 := 40
a0 := 0
b1 := 40
a1 := 10
S2 := CreateMesh(h, b0, b1)
S := CreateSpace(g, a0, a1)
# [3D plot: S]
# [3D plot: S2]
