# Worksheet setting: ORIGIN = 1
A := [
    5.43, 1.12, 0.95, 1.32, 0.83;
    0, 3.79, 1.92, 0.3, 0.74;
    0, 1.93, 6.22, 1.07, 1.43;
    0, 0.3, 1.07, 4.00, 1.05;
    0, 0.74, 1.43, 1.05, 5.34
]
B := [6.54; 1.84; 2.82; 4.68; 4.32]
x := lsolve(A, B) = [0.812981; 0.26055; 0.0746986; 0.983616; 0.559471]
x_m := [0.813016; 0.260314; 0.074769; 0.983610; 0.559486]
r := B - A*x = [8.88178e-16; -2.22045e-16; 0; 8.88178e-16; 0]
δ := sqrt(1/5*sum((x[j] - x_m[j])^2, j = 1 .. 5)) = 0.00011154
