M1 := [0.183683, -3.04991, 15.056899, -22.496287; 0, 1, 0, 0; 0, 0, 1, 0; 0, 0, 0, 1]
y1 := [2.62356^3; 2.62356^2; 2.62356^1; 2.62356^0] = [18.0581; 6.88307; 2.62356; 1]
A := [6.48, 1.3, 0.77, 1.21; 1.3, 3.94, 1.3, 0.16; 0.77, 1.3, 5.66, 2.1; 1.21, 0.16, 2.1, 5.88]
eigenvals(A) = [9.2093; 5.73268; 4.39446; 2.62356]
M2 := [1, 0, 0, 0; -0.54822, 0.253745, -3.065927, 7.757555; 0, 0, 1, 0; 0, 0, 0, 1]
y2 := [4.39446^3; 4.39446^2; 4.39446^1; 4.39446^0] = [84.8626; 19.3113; 4.39446; 1]
p := [-608.66836; 542.777062; -169.1862; 21.96; -1]
polyroots(p) = [2.62356; 4.39446; 5.73268; 9.2093]
M3 := [1, 0, 0, 0; 0, 1, 0, 0; -0.57619, -0.07619, 0.47619, -2.8; 0, 0, 0, 1]
y3 := [5.73268^3; 5.73268^2; 5.73268^1; 5.73268^0] = [188.397; 32.8636; 5.73268; 1]
S := M3*M2*M1 = [
    0.183683, -3.04991, 15.0569, -22.4963;
    -0.100699, 1.92577, -11.3204, 20.0905;
    -0.0981641, 1.6106, -7.33694, 8.63144;
    0, 0, 0, 1
]
y4 := [9.2093^3; 9.2093^2; 9.2093^1; 9.2093^0] = [781.052; 84.8112; 9.2093; 1]
x1 := S*y1 = [-0.669371; 1.82742; -1.30423; 1]
A*x1 - 2.62356*x1 = [-4.98499e-6; 8.40408e-7; 2.15557e-6; -1.46551e-6]
x2 := S*y2 = [0.360816; -1.0132; -0.838105; 1]
A*x2 - 4.39446*x2 = [-1.04389e-5; -1.41589e-5; 7.31011e-6; -5.04685e-6]
x3 := S*y3 = [-1.80573; -0.489506; 1.00758; 1]
A*x3 - 5.73268*x3 = [2.28794e-5; -6.17455e-5; -2.26122e-6; -8.02792e-6]
x4 := S*y4 = [0.966612; 0.513017; 0.989338; 1]
A*x4 - 9.2093*x4 = [0.000537906; -0.000506084; -0.000242616; -7.72967e-6]
