C := 0.4*10^-6
L := 0.8*10^-3
R := 25
U0 := 2
m := 12*10^3
w0 := 1/sqrt(L*C) = 55901.7
b := R/(2*L) = 15625
Q := sqrt(L/(R^2*C) - 1/4) = 1.71756
w_res := sqrt(w0^2 - R^2/(2*L^2)) = 51349
w(f) := U0/(L*C*sqrt((w0^2 - f*w0^2)^2 + 4*b^2*(f^2)*w0^2))
w(2) = 1.33333
