x := 5
f(x) := x^2
f(5) = 25
A := [1, 2, 3, 4; 3, 15, 2, 4; 5, 6, 8, 9; 1, 7, 10, 11]
2 - 5 + 7 = 4
-(-5) = 5
7/3 = 2.33333
B := [5, 6, 8, 4; 3, 2, 3, 2; 17, 3, 1, 26; 1, 2, 7, 2]
1*2*3*4*5*6 = 720
6! = 720
|-10| = 10
A*B = [66, 27, 45, 94; 98, 62, 99, 102; 188, 84, 129, 258; 207, 72, 116, 300]
sqrt(60) = 7.74597
nthroot(120, 5) = 2.60517
5^2 = 25
2^10 = 1024
|A| = 385
100^0.5 = 10
1 + 4*5 = 21
A^-1 = [
    -0.0519481, -0.00779221, 0.251948, -0.184416;
    -0.181818, 0.0727273, -0.0181818, 0.0545455;
    -1.46753, -0.0701299, 0.267532, 0.34026;
    1.45455, 0.0181818, -0.254545, -0.236364
]
(1 + 4)*5 = 25
sum(i, i = 1 .. 15) = 120
product(i, i = 1 .. 15) = 1307674368000
transpose(A) = [1, 3, 5, 1; 2, 15, 6, 7; 3, 2, 8, 10; 4, 4, 9, 11]
x := 5i
x*x = -25
x^2 = -25
y := 25 + 15i
Im(y) = 15
Re(y) = 25
z := 25*e^6i
|z| = 25
arg(z) = -0.283185
