A := [3.81, 0.25, 1.28, 1.25; 2.25, 1.32, 5.08, 0.49; 5.31, 6.78, 0.98, 1.04; 9.89, 2.45, 3.35, 2.28]
b := [4.21; 6.97; 2.38; 10.98]
x := lsolve(A, b) = [1.08091; -0.508351; 1.11903; -0.970832]
r := b - A*x = [8.88178e-16; 0; 1.33227e-15; 0]
δ := sqrt(1/4*((-0.970832 + 0.970832)^2 + (-0.508351 + 0.508351)^2 + (1.119032 - 1.119032)^2 + (1.08091 - 1.08091)^2)) = 0
