# Worksheet setting: ORIGIN = 1
A := [
    5.43, 1.12, 0.95, 1.32, 0.83;
    1.12, 4.03, 2.12, 0.57, 0.91;
    0.95, 2.12, 6.38, 1.29, 1.57;
    1.32, 0.57, 1.29, 4.32, 1.25;
    0.83, 0.91, 1.57, 1.25, 5.46
]
B := [6.54; 3.21; 3.93; 6.25; 5.3]
x := lsolve(A, B) = [0.813056; 0.269133; 0.0700061; 0.98056; 0.557627]
x_m := [0.813016; 0.260314; 0.074769; 0.983610; 0.559486]
r := B - A*x = [0; 0; -4.44089e-16; -8.88178e-16; -8.88178e-16]
δ := sqrt(1/5*sum((x[j] - x_m[j])^2, j = 1 .. 5)) = 0.00475844
