y(x) := sin(1.5*x) + nthroot(3*x, 3)
F(x) := -2.01 + 0.026*(x + 4) + 0.23825*(x + 4)*(x + 2) - 0.0397083*(x + 4)*(x + 2)*x
u := -5, -4.95 .. 5
# [plot: y(u), F(u) vs u]
x := [-4; -2; 0; 2; 4]
y := y(x) = [-2.01001; -1.95824; 0; 1.95824; 2.01001]
f1(t) := sin(1.5*t) + nthroot(3*t, 3)
s := cspline(x, y)
A(t) := interp(s, x, y, t)
# [plot: A(u), f1(u) vs u]
