f1(x) := -2.01 - 0.339317*(x + 4) + 0.091329*(x + 4)^3
f2(x) := -1.958 + 0.756633*(x + 2) + 0.545975*(x + 2)^2 - 0.218396*(x + 2)^3
f3(x) := 1.995533*x - 0.7624*x^2 + 0.127067*x^3
f4(x) := 1.958 + 0.026*(x - 2)
y(x) := sin(1.5*x) + nthroot(3*x, 3)
x := -4, -3.95 .. -2
t := -2, -1.95 .. 0
u := 0, 0.05 .. 2
i := 2, 2.05 .. 4
a := -4, -3.95 .. 4
# [plot: f1(x), f2(t), f3(u), f4(i), y(a) vs x, t, u, i, a]
