f(x) := x^5 - 3*x^4 + 7*x^2 - 12
f1(x) := 5*x^4 - 12*x^2 + 14*x
a0 := 1
b0 := 3
e := 0.00001
x1 :=
    a ← a0
    b ← b0
    while |a - b| > e
        c ← (a + b)/2
        if f(a)*f(c) > 0
            a ← c
        else
            b ← c
    = 1.99999  # Метод бісекції
x2 :=
    x ← a0
    x_prev ← 0
    a ← a0
    b ← b0
    while |x - x_prev| > e
        x_prev ← x
        c ← (a*f(b) - b*f(a))/(f(b) - f(a))
        if f(a)*f(c) < 0
            b ← c
        else
            a ← c
        x ← c
    = 1.99997  # Метод хорд
x3 :=
    x ← b0
    x_prev ← 0
    while |x - x_prev| > e
        x_prev ← x
        x ← x_prev - f(x)/f1(x)
    = 2.00003  # Метод Ньютона
