a := 1
b := 3
ε := 0.0001
n := 2^13
m := 4
f(x) := cos(x)/(x + 1)
integral(f(x), x = 1 .. 3) = -0.176142
f1(x) := d^2/dx^2(f(x)) → ((2*x + 2)*sin(x) + (1 - (x^2 + 2*x))*cos(x))/(x^3 + 3*x^2 + 3*x + 1)
f2(x) := d^8/dx^8(f(x)) → ((-(8*x^7) - 56*x^6 + 168*x^5 + 1400*x^4 - 3640*x^3 - 16968*x^2 + 21784*x + 33928)*sin(x) + (x^8 + 8*x^7 - 28*x^6 - 280*x^5 + 910*x^4 + 5656*x^3 - 10892*x^2 - 33928*x + 21785)*cos(x))/(x^9 + 9*x^8 + 36*x^7 + 84*x^6 + 126*x^5 + 126*x^4 + 84*x^3 + 36*x^2 + 9*x + 1)
x := 1, 1.01 .. 3
# [plot: f1(x) vs x]
# [plot: f2(x) vs x]
# Максимальне значення f1 при x = 1.95, f2 при x = 1
err1 := (b - a)^3/(12*n^2)*f1(a + 0.95) = 3.08095e-9  # Аналітичне значення похибки для методу трапецій
err2 := (m!)^4*(b - a)^(2*m + 1)/((2*m + 1)*[(2*m)!]^3)*f2(a) = [1.22291e-5]  # Аналітичне значення похибки для квадратичної формули Гауса
|-0.1761 - (-0.1761)| = 0  # Реальне значення похибки для методу трапецій
|-0.1761 - (-0.1761)| = 0  # Реальне значення похибки квадратичної формули Гауса
n := 2^6
eps1 := (b - a)^3/(12*n^2)*f1(a + 0.95) = 5.04783e-5
|eps1 ≤ ε| = 1
# Мінімальна кількість кроків - 6
m := 4
eps2 := (m!)^4*(b - a)^(2*m + 1)/((2*m + 1)*[(2*m)!]^3)*f2(a) = [1.22291e-5]
|eps2 ≤ ε| = 1
# Мінімальна кількість кроків - 4
