a := 1
b := 3
ε := 0.0001
n := 2^13
m := 4
f(x) := cos(x)/(x + 1)
r := integral(f(x), x = 1 .. 3) = -0.176142
f1(x) := d^2/dx^2(f(x)) → ((2*x + 2)*sin(x) + (1 - (x^2 + 2*x))*cos(x))/(x^3 + 3*x^2 + 3*x + 1)
f2(x) := d^8/dx^8(f(x)) → ((-(8*x^7) - 56*x^6 + 168*x^5 + 1400*x^4 - 3640*x^3 - 16968*x^2 + 21784*x + 33928)*sin(x) + (x^8 + 8*x^7 - 28*x^6 - 280*x^5 + 910*x^4 + 5656*x^3 - 10892*x^2 - 33928*x + 21785)*cos(x))/(x^9 + 9*x^8 + 36*x^7 + 84*x^6 + 126*x^5 + 126*x^4 + 84*x^3 + 36*x^2 + 9*x + 1)
err1 := (b - a)^3/(12*n^2)*f1(a + 0.95) = 3.08095e-9  # Аналітичне значення похибки для методу трапецій
err2 := (m!)^4*(b - a)^(m - 1)/((2*m - 1)*[(2*m)!]^3)*f2(a) = [2.45675e-7]  # Аналітичне значення похибки для квадратичної формули Гауса
|r - (-0.176081)| = 6.07654e-5  # Реальне значення похибки для методу трапецій
|r - (-0.176142)| = 2.34632e-7  # Реальне значення похибки квадратичної формули Гауса
n := 2^6
eps1 := (b - a)^3/(12*n^2)*f1(a + 1) = 5.04486e-5
|eps1 ≤ ε| = 1
# Мінімальна кількість кроків - 6
m := 3
eps2 := (m!)^4*(b - a)^(m - 1)/((2*m - 1)*[(2*m)!]^3)*f2(a + 0.8) = [5.42178e-6]
|eps2 ≤ ε| = 1
# Мінімальна кількість кроків - 3
