f(x, y) := 1 + 1.8*y*sin(x) - y^2
x0 := 0
y0 := 0
x1 := 6
solve block
    # constraints
    y'(x) == f(x, y(x))
    y(x0) == y0
    # solver
    y := odesolve(y(x), x1)
end solve block
x := 0, 0.1 .. 6
# [plot: y(x) vs x]
y(0) = 0
y(3) = 1.51854
y(0.5) = 0.530997
y(3.5) = 1.07025
y(1) = 1.18593
y(4) = 0.729953
y(1.5) = 1.80958
y(4.5) = 0.540477
y(2) = 2.07811
y(5) = 0.472746
y(2.5) = 1.92506
y(5.5) = 0.494692
y(6) = 0.60566
D(t, y) := [y[1]; -y[0] - 0.8*y[1]]
y0 := [0.1; 0]
u := rkfixed(y0, 0, 50, 100, D)
u = [
    0, 0.1, 0;
    0.5, 0.0892604, -0.0395333;
    1, 0.0640454, -0.0580722;
    1.5, 0.0342093, -0.0587884;
    2, 0.00729434, -0.0474061;
    2.5, -0.0122302, -0.0302056;
    3, -0.022858, -0.0125736;
    3.5, -0.0253739, 0.00178991;
    4, -0.0219413, 0.0110628;
    4.5, -0.0152114, 0.01505
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]
# [plot: u[:, 2] vs u[:, 1]]
